# Header
Tamb_max := 85 °C
Usys_max := 25 V
U_Bat := 3.6 V
Tamb_min := -25 °C
Usys_min := 2.5 V
T_max := 125 °C
# LED Driver TL3477
# Maximale Ausgangsspannung:
Uout_max := 40 V
R8L := 680 kΩ
Uout_max == 1.235*V*(1 + R8L/R10L) solve, R10L → 21.6638720495*kΩ
# Eingangsstrom-Begrenzung:
Iin_max := 3 A
R4L := 0.1 V/Iin_max = 0.0333333 Ω
# LED-Strom:
Iout := 1 A
R5L := 0.1 V/Iout = 0.1 Ω  # .. Annahme: IADJ2(Pin9) > 650mV
# Frequenzkompensation:
R18L := 1 kΩ
C8L := 4.7 nF
# Schaltfrequenz:
R13L := 18 kΩ  # .. ca. 1MHz
# Stromwerte: (aus SPICE Simulation)
I_CRMS := 1.6 A
I_Cavg := 0 A
I_Cpeak := 3.8 A
I_DRMS := 1.7 A
I_Davg := 1 A
I_Dpeak := 4 A
I_LRMS := 3 A
I_Lavg := 3 A
I_Lpeak := 4.2 A
# LED-Stromeinstellung:
f_modmax := 1 kHz  # .. max LED-Strommodulationsrate
U_Iadj2max := 0.625 V  # .. ergibt max. LED-Strom
U_adcmin := Usys_min  # .. min. DAC-Spannung, soll max LED Strom liefern
R11L := 33 kΩ
U_adcmin/(R9L + R11L) == U_Iadj2max/R11L solve, R9L → 99.0*kΩ
f_modmax == 1/(2*π*R11L*C6L) solve, C6L → 1/(66*π*kΩ*kHz) = 4.82288 nF
# Battery Management - LTC4015
# Schaltfrequenz:
R_T := 100 kΩ
f_OSC := 47.65 MHz*Ω/(R_T/1000) = 476500 1/s
# Eingangsstrom MAX:
I_IN_MAX := 3 A
I_IN_MAX == 0.032 V/R_SNSI solve, R_SNSI → 0.0106666666667*V/A
# Ladestrom MAX:
I_CHG_MAX := 4 A
I_CHG_MAX == 0.032 V/R_SNSB solve, R_SNSB → 0.008*V/A
# Induktivität:
L := U_Bat*(1 - U_Bat/Usys_max)/(0.25*f_OSC*I_CHG_MAX) = 6.46716e-6 H  # .. liefert 25% Ripple-Strom.
I_L_MAX := 1.6*I_CHG_MAX = 6.4 A
ΔI_L := 1/L*(Usys_max - U_Bat)*1/f_OSC*U_Bat/Usys_max = 1 A  # .. aus Tietze Schenk, Halbleiterschaltungstechnik S. 944
# Kapazität Csys und Cbat
Csys := 22 μF  # .. bei max Eingangsspannung liefert X7R 30% der Nennkapazität. Cnom = 3*Csys
ESR_CSYS := 0.003 Ω
ΔUsys := U_Bat/Usys_max*(1 - U_Bat/Usys_max)*I_CHG_MAX/(Csys*f_OSC) + I_CHG_MAX*ESR_CSYS = 0.0590339 V
I_RMS := I_CHG_MAX/2 = 2 A  # .. worst case
C_Bat := 22 μF
ESR_CBAT := 0.003 Ω
ΔU_Bat := ΔI_L*(1/(8*C_Bat*f_OSC) + ESR_CBAT) = 0.0149241 V
